// SBML level 3 version 1

model example0()

  // Compartments:
  compartment default_compartment = 1;

  // Species:
  species A in default_compartment = 100/default_compartment;
  species B in default_compartment = 0;
  species C in default_compartment = 0;
  species D in default_compartment = 0;
  species E in default_compartment = 0;

  // Parameters:
  K1 = 56.49652;
  K_1 = 1/K1;
  K2 = K1;
  K_2 = K_1;
  K3 = K1;
  K_3 = K_1;
  K4 = 424.6514;
  K_4 = 1/K4;
  K5 = K4;
  K_5 = K_4;

  // Reactions:
  _J0: A -> B; K1*A/B;
  _J1: B -> A; K_1*B/A;
  _J2: B -> C; K2*B/C;
  _J3: C -> B; K_2*C/B;
  _J4: C -> D; K3*C/D;
  _J5: D -> C; K_3*D/C;
  _J6: A -> E; K4*A/E;
  _J7: E -> A; K_4*E/A;
  _J8: E -> D; K5*E/D;
  _J9: D -> E; K_5*D/E;
end
